# OpenSim document version 40000
MarkerSet:
  Marker Sternum: torso (0.05242039 0.3665782 0)
  Marker RShoulder: torso (-0.03 0.44 0.15)
  Marker LShoulder: torso (-0.03 0.44 -0.15)
  Marker RASIS: pelvis (0.02 0.03 0.128)
  Marker LASIS: pelvis (0.02 0.03 -0.128)
  Marker LPSIS: pelvis (-0.16 0.06728453 -0.01485659)
  Marker RPSIS: pelvis (-0.16 0.06512056 0.02447625)
  Marker RKneeLateral: femur_r (0 -0.404 0.05)
  Marker RKneeMedial: femur_r (0 -0.404 -0.05)
  Marker RFibulaHead: tibia_r (-0.002601802 -0.065 0.05660296)
  Marker RMidShank: tibia_r (0.05 -0.2054491 0)
  Marker RAnkleLateral: tibia_r (-0.005 -0.41 0.053)
  Marker RAnkleMedial: tibia_r (0.006 -0.3888 -0.038)
  Marker RHeel: calcn_r (-0.02 0.02 0)
  Marker RMT2: calcn_r (0.13 0.03 -0.03)
  Marker RMT5: calcn_r (0.1 0.02 0.04)
  Marker RToe: calcn_r (0.26 0.005 0)
  Marker LKneeLateral: femur_l (0 -0.404 -0.05)
  Marker LKneeMedial: femur_l (0 -0.404 0.05)
  Marker LFibulaHead: tibia_l (0.005 -0.065 -0.05)
  Marker LMidShank: tibia_l (0.04452976 -0.2307587 -0.00174871)
  Marker LAnkleLateral: tibia_l (-0.005 -0.41 -0.053)
  Marker LAnkleMedial: tibia_l (0.006 -0.3888 0.038)
  Marker LHeel: calcn_l (-0.02 0.02 0)
  Marker LMT2: calcn_l (0.13 0.03 0.03)
  Marker LMT5: calcn_l (0.1 0.02 -0.04)
  Marker LToe: calcn_l (0.26 0.005 0)
